// COMSOL Multiphysics 6.2.0.339 model "CQDR_new_vacio.mph"
// Outline of the model tree

Parameters
  hd = 6
  wd = 10
  hr = 6
  wr = 10
  dr = 24
  wl = 2
  V_inh = 0
  V_ine = 0
  V_outh = 0.18  // potencial para el huevco en AlGaAs
  V_oute = 0.262  // (modificar)
  hbar = hbar_const[rad/(J*s)]
  ch_in = hbar^2/(2*mh_in)/q
  ch_out = hbar^2/(2*mh_out)/q
  ce_in = hbar^2/(2*me_in)/q  // GaAs
  ce_out = hbar^2/(2*me_out)/q  // AlGaAs
  mh_in = 0.51*me_const[1/kg]
  mh_out = 0.6*me_const[1/kg]
  me_in = 0.067*me_const[1/kg]  // (modificar)
  me_out = 0.092*me_const[1/kg]  // (modificar)
  F = 10^5*Fauxiliar
  Fauxiliar = 0  // en kV/cm (9)
  cc = -k*q^2/(4*pi*epsilon)
  k = 0  // 0 sin impureza 1 con
  epsilon = epsilon0_const*12.35[m/F]  // (modificar)
  q = e_const[1/C]
  r_imp = 0
  z_imp = 0
  l = 0
  xc = 0.3
  Qc = 0.67
  m0 = me_const[1/kg]
  B = 8  // Campo magnético T
  rojl = 3e22[1/m^3]  // Diferencia de densidad de población entre los estados, unidad partículas/m^3
  omegac = 40e12[1/s]  // Frecuencia de Rabi
  gamma2 = 0.1*10^12[1/s]
  gamma3 = 5*10^12[1/s]
  Ebar = Ebar_auxiliar*10^(-3)  // Energía del láser resonante, unidades eV
  Ebar_auxiliar = 20  // en unidades de meV
  epsilon0 = epsilon0_const[m/F]
  wsx = (rojl*sigma*(1.6e-19)^2)/(1.0546e-34*3e8*sqrt(epsilon_r)*8.85e-12)  // Constante para el coeficiente de absorción
  sigma = 5e-3  // Relacionado con ancho del pico, en unidades eV
  gfdg = (rojl*q)/(2*2.8^2*8.854187e-12)  // Constante para el cambio en el índice de refracción
  wcxcn = 2*wsx*1e8/(8.85e-12*2.8*3e8)
  sqgshg = 4*3.14e-7*3e8*rojl*1e8/(4*2.8^3*8.85e-12)*q
  mu_r = 1
  epsilon_r = 12.47  // Cte dieléctrica promedio entre GaAs y AlGaAs con x=0.3
  mu0 = mu0_const
  cm = 1/sqrt(epsilon0*epsilon_r*mu0*mu_r)  // velocidad de la luz en el medio

Functions
  an1: Analytic "Perfil" | expr = hd*exp(-(r*10^9)^2/wd^2)+hr*exp(-((r*10^9)-dr)^2/wr^2)+wl; args = r
  an2: Analytic | funcname = Eg; expr = 1.5194+1.36*x+0.22*x^2
  an3: Analytic | funcname = Vc; expr = Qc*(Eg(x)-Eg(0))
  an4: Analytic | funcname = m_ef; expr = m0*(1+(28.9-6.29*x)/3*(2/Eg(x)+1/(Eg(x)+0.341-0.066*x))-3.935+0.488*x+4.938*x^2)^(-1)

Variables
  var1 "Variables 1"
    u_nor = u/sqrt(intop1(conj(u)*u))
    M1zn = (abs(intop1(conj(with(1,u_nor))*z*u_nor)))
    chi = rojl*(M12)^2*q^2/(epsilon0*epsilon_r*hbar*thetap)*(gamma3*(omegac^2/4+gamma2*gamma3)+delta^2*gamma2)
    M12 = abs(intop1(conj(with(1,u_nor))*z*with(2,u_nor)))
    eit = Ebar*chi/(hbar*cm)*q
    delta = (with(2,lambda)-with(1,lambda)-Ebar)*q/hbar
    thetap = (omegac^2/4+gamma2*gamma3-delta^2)^2+delta^2*(gamma2+gamma3)^2
    dd = (lambda-with(1,lambda))
    M11zn = (abs(intop1(conj(with(1,u_nor))*z*with(1,u_nor))))
    M22zn = (abs(intop1(conj(with(2,u_nor))*z*with(2,u_nor))))
    abt1 = wsx*((M1zn)^2)*Ebar/((dd-Ebar)^2+(sigma/(2*pi))^2)/(2*pi)
    abtn = -wcxcn*(M1zn)^2*Ebar/(((dd-Ebar)^2+sigma^2)^2)*(4*M1zn^2-((M22zn-M11zn)^2*(3*dd^2-4*dd*Ebar+Ebar^2-sigma^2))/(dd^2+sigma^2))
    difr = (gfdg)*(M1zn)^2*((dd-Ebar)/((dd-Ebar)^2+sigma^2))
    difrrn = -(sqgshg)*(M1zn^2)/((dd-Ebar)^2+sigma^2)^2*((4*(dd-Ebar)*M1zn^2-(M22zn-M11zn)^2/(dd^2+sigma^2)*((dd-Ebar)*(dd*(dd-Ebar)-sigma^2)-sigma^2*(2*dd-Ebar))))
    M2zn = abs(intop1(conj(with(2,u_nor))*z*u_nor))
    abt2 = wsx*((M2zn)^2)*Ebar/((dd2-Ebar)^2+sigma^2)
    dd2 = (lambda-with(2,lambda))
    prueba = with(1,lambda)
  var2 "Variables 2" on selection sel2
    ch = ch_out
    mh = mh_out
    Vh = V_outh
    ce = ce_out
    me = me_out
    Ve = V_oute
    eps_r = epsilon
  var3 "Variables 3" on selection sel3
    ch = ch_in
    mh = mh_in
    Vh = V_inh
    ce = ce_in
    me = me_in
    Ve = V_ine
    eps_r = epsilon
  var4 "Variables 4"
    ue_nor = ue/sqrt(intop1(ue*conj(ue))[1/m])
    uh_nor = uh/sqrt(intop1(uh*conj(uh))[1/m])
    impur = (-(pref/eps_r1)*(1/sqrt((r-R0)^2+(z-Z0[nm])^2)))/q0[1/m]
    pos = (1/sqrt((r-R0)^2+(z-Z0[nm])^2))
    pp = +(1/sqrt((r-R0)^2+(z-(Z0-0.5*h1)[nm])^2))+(1/sqrt((r-R0)^2+(z-(Z0+0.5*h1)[nm])^2))
    mimpur = ((pref/eps_r1)*pos)/q0[1/m]
    EnBh = q0^2*B0^2*r^2/(8*mh)/q0[m^2]
    EnBe = q0^2*B0^2*r^2/(8*me)/q0[m^2]
    EnEh = -q0*E0*z/q0[m]
    EnEe = q0*E0*z/q0[m]
  var5 "Variables 5"
    carga1 = e_const*fi_h*conj(fi_h)[1/m]
    carga2 = e_const*fi_e*conj(fi_e)[1/m]
    fi_h = withsol('sol2',uh_nor, setval(wr, wr), setval(wd, wd), setind(lambda,1))
    fi_e = withsol('sol29',ue_nor, setval(wr, wr), setval(wd, wd), setind(lambda,1))

Selections
  sel2: Explicit "Matriz" on domains 1, 2, 4-7
  sel3: Explicit "Nano" on domains 3

Couplings
  intop1: Integration on domains 1-4, 6 | axisym = on

Coordinate systems
  ie1: InfiniteElement "Infinite Element Domain 1" on domains 1, 4-7 | ScalingType = Cylindrical

Geometry
  geom1 "Geometría 1" (2D axisymmetric, length unit nm)
    pol1: Polygon "Polígono 1" (disabled)
      source = table
      table = 
        {0, 8.3}
        {0.5, 8.29767}
        {1, 8.29069}
        {1.5, 8.27907}
        {2, 8.26283}
        {2.5, 8.24202}
        {3, 8.21668}
        {3.5, 8.18686}
        {4, 8.15264}
        {4.5, 8.11408}
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    r1: Rectangle "Rectángulo 1"
      pos = {40, 5}
      base = center
      layername = Layer 1
      layer = 1
      layerright = on
      layertop = on
      size = {80, 30}
    pc1: ParametricCurve | parmax = 50; coord = {s, hd*exp(-(s^2/wd^2)) + hr*exp(-((s-dr)^2/wr^2)) + wl}
    pol2: Polygon | type = open; source = table; table = {{50, 2}, {50, 0}, {0, 0}, {0, hd+2}}
    ccur1: ConvertToCurve | input = pc1, pol2; keep = on
    par1: Partition "Partition Objects 1" | input = r1; tool = selection ccur1
    pard1: PartitionDomains
      domain = par1(1) domains 1-3, 5
      vertexsegment = selection ccur1.pnt
      vertexline = par1(1) points 3-5, 8
      edge = par1(1) boundaries 5, 6, 12, 23
    fin: Finalize "Form Union" | pairtype = contact

Physics
  ch_sol: CoefficientFormPDE "EDP en forma de coeficientes" on all domains
    dependent variable uh
    EquationForm.form = Automatic
    cfeq1: CoefficientFormPDE "EDP en forma de coeficientes 1" (default)
      c = {ch, 0, 0, ch}
      a = Vh
      f = 0
      da = 1
      be = {-ch/r, 0}
    zflx1: ZeroFluxBoundary "Flujo cero 1" (default)
    init1: init "Valores iniciales 1" (default)
    cfeq2: CoefficientFormPDE "EDP en forma de coeficientes 2" (disabled) on selection sel2
      c = {c_out/m_ef(0.3), 0, 0, c_out/m_ef(0.3)}
      a = 0.262+cc/sqrt((r-r_imp)^2+(z-z_imp)^2)+c_out/m_ef(0.3)*l^2/r^2+hbar*B*l/2/m_ef(0.3)+q*B^2*r^2/8/m_ef(0.3)+F*z
      f = 0
      da = 1
      be = {-c_out/m_ef(0.3)/r, 0}
    dir1: DirichletBoundary "Condición de contorno de Dirichlet 1" on boundaries 2, 11, 15, 20-23 | r = 0
  ce_sol: CoefficientFormPDE "EDP en forma de coeficientes 1" on all domains
    dependent variable ue
    cfeq1: CoefficientFormPDE "EDP en forma de coeficientes 1" (default)
      c = {ce, 0, 0, ce}
      a = Ve
      da = 1
      be = {-ce/r, 0}
    zflx1: ZeroFluxBoundary "Flujo cero 1" (default)
    init1: init "Valores iniciales 1" (default)
    cfeq2: CoefficientFormPDE "EDP en forma de coeficientes 2" (disabled) on selection sel2
      c = {c_out/m_ef(0.3), 0, 0, c_out/m_ef(0.3)}
      a = 0.262+cc/sqrt((r-r_imp)^2+(z-z_imp)^2)+c_out/m_ef(0.3)*l^2/r^2+hbar*B*l/2/m_ef(0.3)+q*B^2*r^2/8/m_ef(0.3)+F*z
      da = 1
      be = {-c_out/m_ef(0.3)/r, 0}
    dir1: DirichletBoundary "Condición de contorno de Dirichlet 1" on boundaries 2, 11, 15, 20-23
      r = 0
      useDirichletCondition = 1
      constraintType = unidirectionalConstraint
      constraintMethod = elemental
  es: Electrostatics on all domains
    dependent variable V
    ccn1: ChargeConservation (default) | epsilonr_mat = userdef; epsilonr = eps_r
    axi1: AxialSymmetry (default)
    zc1: ZeroCharge (default)
    init1: init "Initial Values 1" (default)
    gnd1: Ground on boundaries 2, 11, 15, 20-23
    scd1: SpaceChargeDensity on all domains | rhoq = carga1

Mesh
  mesh1 "Malla 1"
    size: MeshSizeDefault "Tamaño" | hmax = 5.36; hmin = 0.024; hcurve = 0.3; hgrad = 1.3
    ftri1: FreeTri "Free Triangular 1" on remaining entities | smoothmaxiter = 4; smoothmaxdepth = 4
    ref1: Refine on no domains

Studies
  std1 "Estudio 1"
    param3: Parametric "Parametric Sweep 3"
      sweeptype = filled
      pname = {wd, wr}
      plistarr = {range(2,2,10), range(2,2,10)}
      punit = {, }
    eigv: Eigenvalue "Valor propio" | neigs = 3; linpsolnum = auto; solve for = {ch_sol}; pname = l; plistarr = 0,-1,-2
  std2 "Study 2"
    param1: Parametric "Parametric Sweep 3" | pname = {wd, wr}; plistarr = {range(2,2,10), range(2,2,10)}
    eigv1: Eigenvalue "Valor propio" | neigs = 3; solve for = {ce_sol}; pname = l; plistarr = 0,-1,-2
  std3 "Study 3"
    param1: Parametric "Parametric Sweep 3" | pname = {wd, wr}; plistarr = {range(2,2,10), range(2,2,10)}
    stat: Stationary | solve for = {es}

Solver configurations
  sol1 "Solution 1" (study std1)
    v1: Variables "Dependent Variables 1"
    e1: Eigenvalue "Eigenvalue Solver 1"
      dDef: Direct
  sol2 "Parametric Solutions 1" (study std1)
  sol28 "Solution 28" (study std2)
    v1: Variables "Dependent Variables 1"
    e1: Eigenvalue "Eigenvalue Solver 1"
      dDef: Direct
  sol29 "Parametric Solutions 2" (study std2)
  sol55 "Solution 55" (study std3)
    v1: Variables "Dependent Variables 1"
    s1: Stationary "Stationary Solver 1"
      dDef: Direct
      fc1: FullyCoupled | linsolver = dDef
  sol56 "Parametric Solutions 3" (study std3)

Datasets
  dset1: Solution | solution = sol1
  dset2: Solution | solution = sol2
  rev1: Revolve2D "Revolution 2D 1" | data = dset2; startangle = -90; revangle = 225
  dset3: Solution | solution = sol28
  dset4: Solution | solution = sol29
  rev2: Revolve2D "Revolution 2D 2" | data = dset4; startangle = -90; revangle = 225
  dset5: Solution | solution = sol55
  dset6: Solution | solution = sol56
  rev3: Revolve2D "Revolution 2D 3" | data = dset6; startangle = -90; revangle = 225

Derived values
  gev1: EvalGlobal "Global Evaluation 1" | data = dset6; table = tbl2; expr = intop1(carga2*V)

Tables
  tbl1: Table
    // Global Evaluation 1
    wd | wr | hd | hr | Solution=1, Eigenvalue | Solution=2, Eigenvalue | Solution=3, Eigenvalue
    2 | 2 | 2 | 2 | 0.271579 | 0.281651 | 0.285213
    2 | 2 | 2 | 4 | 0.271579 | 0.28165 | 0.285215
    2 | 2 | 2 | 6 | 0.271579 | 0.28165 | 0.285214
    2 | 2 | 2 | 8 | 0.271579 | 0.28165 | 0.285212
    2 | 2 | 4 | 2 | 0.271579 | 0.281651 | 0.285214
    2 | 2 | 4 | 4 | 0.271579 | 0.28165 | 0.285214
    2 | 2 | 4 | 6 | 0.271579 | 0.28165 | 0.285213
    2 | 2 | 4 | 8 | 0.271579 | 0.28165 | 0.285212
    2 | 2 | 6 | 2 | 0.271579 | 0.281651 | 0.285214
    2 | 2 | 6 | 4 | 0.271579 | 0.28165 | 0.285212
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  tbl2: Table
    // Global Evaluation 1
    wd | wr | Integration 1 (meV)
    2 | 2 | 6.96866e+11
    4 | 2 | 5.02645e+11
    6 | 2 | 2.84244e+12
    8 | 2 | 2.53494e+12
    10 | 2 | 2.30251e+12

Plots
  pg1: PlotGroup1D "1D Plot Group 1" | data = none
    tblp1: Table "Table Graph 1" | table = tbl1
  pg2: PlotGroup2D "EDP en forma de coeficientes" | data = dset2
    surf1: Surface | expr = uh
  pg3: PlotGroup3D "EDP en forma de coeficientes 1" | data = rev1
    surf1: Surface | expr = uh
  pg4: PlotGroup2D "EDP en forma de coeficientes 1.1" | data = dset4
    surf1: Surface | expr = ue
  pg5: PlotGroup3D "EDP en forma de coeficientes 1.2" | data = rev2
    surf1: Surface | expr = ue
  pg6: PlotGroup2D "Electric Potential (es)" | data = dset6; dataisaxisym = on
    surf1: Surface | expr = V
    str1: Streamline on boundaries 1-24 | expr = {es.Er, es.Ez}; udist = 0.02
      col1: Color "Color Expression 1" | expr = V
      filt1: Filter | expr = !isScalingSystemDomain
  pg7: PlotGroup3D "Electric Potential, Revolved Geometry (es)" | data = rev3
    vol1: Volume | expr = V
  pg8: PlotGroup2D "Electric Field Norm (es)" | data = dset6; dataisaxisym = on
    surf1: Surface | expr = es.normE
    str1: Streamline on boundaries 1-24 | expr = {es.Er, es.Ez}; udist = 0.02
      col1: Color "Color Expression 1" | expr = es.normE
      filt1: Filter | expr = !isScalingSystemDomain
  pg9: PlotGroup1D "1D Plot Group 9" | data = none
    tblp1: Table "Table Graph 1" | table = tbl2